// COMSOL Multiphysics 5.1.0.234 model "exact_boundary_conditions.mph"
// Outline of the model tree

Parameters
  u1 = 1 [V]  // voltage on the 1st electrode
  u2 = 0 [V]  // voltage on the 2nd electrode
  u3 = 0 [V]  // voltage on the 3rd electrode
  u4 = 0 [V]  // voltage on the 4th electrode
  inf_addition = 100e-6 [m]  // size of the infinite element domains
  domain_height = 800e-6 [m]  // should be large enough to avoid boundary distortion effects
  domain_size = 6400e-6 [m]
  em = 24.3  // relative permittivity of the medium
  sm = 375e-7 [S/m]  // electric conductivity of the medium

Coordinate systems
  ie1: InfiniteElement "Infinite Element Domain 1" on domains 1-8, 10-18

Geometry
  geom1 "Geometry 1" (3D, length unit m)
    imp1: Import "geometry_of_the_electrodes"
      type = cad
      filename = geometry\quadrupolar_electrode_array.dxf
      keepsolid = off
      keepbnd = off
      keepfree = on
      unitecurves = off
      removeredundant = on
    sca1: Scale | input = imp1; isotropic = 1e-6
    blk1: Block | pos = {-domain_size/2, -domain_size/2, 0}; size = {domain_size, domain_size, domain_height}
    blk2: Block | pos = {-domain_size/2, domain_size/2-inf_addition, 0}; size = {domain_size, inf_addition, domain_height}
    blk3: Block | pos = {-domain_size/2, -domain_size/2, 0}; size = {domain_size, inf_addition, domain_height}
    blk4: Block | pos = {-domain_size/2, -domain_size/2, 0}; size = {inf_addition, domain_size, domain_height}
    blk5: Block | pos = {domain_size/2-inf_addition, -domain_size/2, 0}; size = {inf_addition, domain_size, domain_height}
    blk6: Block
      pos = {-domain_size/2, -domain_size/2, domain_height-inf_addition}
      size = {domain_size, domain_size, inf_addition}
    fin: Finalize "Form Union"

Materials
  mat1: Common "medium" on all domains
    def "Basic"
      relpermittivity = em
      electricconductivity = sm

Physics
  es: Electrostatics on all domains
    dependent variable V
    ccn1: ChargeConservation (default)
    zc1: ZeroCharge (default)
    init1: init "Initial Values 1" (default)
    pot1: ElectricPotential "potential_of_1st_electrode" on boundaries 49
    pot2: ElectricPotential "potential_of_2nd_electrode" on boundaries 50
    pot3: ElectricPotential "potential_of_3rd_electrode" on boundaries 48
    pot4: ElectricPotential "potential_of_4th_electrode" on boundaries 47

Mesh
  mesh1 "Mesh 1" (physics-controlled)
    size: MeshSizeDefault | hauto = 1

Studies
  std1 "Study 1"
    stat: Stationary

Solver configurations
  sol1 "Solution 1" (study std1)
    v1: Variables "Dependent Variables 1"
    s1: Stationary "Stationary Solver 1"
      fc1: FullyCoupled | linsolver = i1
      i1: Iterative | linsolver = cg
        mg1: Multigrid | prefun = amg
      prob1: SolverProblem "Information 1"
        warning1: SolverWarning "Warnings 1"

Datasets
  dset1: Solution | solution = sol1

Plots
  pg1: PlotGroup3D "Electric Potential (es)" | data = dset1
    mslc1: Multislice | expr = V

Exports
  data1: Data "exact_boundary_potential"
    data = dset1
    expr = V
    filename = exact_boundary_conditions.txt
    location = grid
    gridx3 = range(-0.0031,5.0e-6,0.0031)
    gridy3 = range(-0.0031,5.0e-6,0.0031)
    gridz3 = 0