// COMSOL Multiphysics 5.1.0.234 model "extraction_of_multipoles.mph"
// Outline of the model tree

Parameters
  R = 95e-6 [m]  // radius of the integration sphere (the whole object of interest should fit inside)
  domain_size = (190e-6/0.18) [m]  // size of the computational domain (the larger the better)
  q00 = 0  // components of spherical multipolar moments used to define the source potential on the domain surface
  q10 = 0
  q11 = 1
  q20 = 0
  q21 = 0
  q22 = 0
  q30 = 0
  q31 = 0
  q32 = 0
  q33 = 0
  q40 = 0
  q41 = 0
  q42 = 0
  q43 = 0
  q44 = 0
  q50 = 0
  q51 = 0
  q52 = 0
  q53 = 0
  q54 = 0
  q55 = 0
  e0 = 8.8542e-12 [F/m]  // permittivity of vacuum
  em = 24.3  // relative permittivity of medium
  sm = 2.18e-4 [S/m]  // electric conductivity of medium
  ep = 3.2  // relative permittivity of the object
  sp = 5.556e-15 [S/m]  // electric conductivity of the object
  ep_aux = ep  // auxiliary variable
  sp_aux = sp  // auxiliary variable
  f = 25000 [Hz]  // frequency of the electric field

Variables
  var1 "Variables 1"
    source_potential = 1/(em*e0)*((conj(-conj(q11))/3*sqrt(3/(8*pi))*sin(sys2.theta)*exp(-1i*sys2.phi)/sys2.r^2)+(conj(q10)/3*sqrt(3/(4*pi))*cos(sys2.theta)/sys2.r^2)+(conj(q11)/3*(-sqrt(3/(8*pi)))*sin(sys2.theta)*exp(1i*sys2.phi)/sys2.r^2))+1/(em*e0)*((conj(conj(q22))/5*sqrt(15/(32*pi))*sin(sys2.theta)^2*exp(-2*1i*sys2.phi)/sys2.r^3)+(conj(-conj(q21))/5*sqrt(15/(8*pi))*sin(sys2.theta)*cos(sys2.theta)*exp(-1i*sys2.phi)/sys2.r^3)+(conj(q20)/5*sqrt(5/(16*pi))*(3*cos(sys2.theta)^2-1)/sys2.r^3)+(conj(q21)/5*(-sqrt(15/(8*pi)))*sin(sys2.theta)*cos(sys2.theta)*exp(1i*sys2.phi)/sys2.r^3)+(conj(q22)/5*sqrt(15/(32*pi))*sin(sys2.theta)^2*exp(2*1i*sys2.phi)/sys2.r^3))+1/(em*e0)*((conj(-conj(q33))/7*(1/8*sqrt(35/pi))*exp(-3*1i*sys2.phi)*sin(sys2.theta)^3/sys2.r^4)+(conj(conj(q32))/7*1/4*sqrt(105/(2*pi))*exp(-2*1i*sys2.phi)*sin(sys2.theta)^2*cos(sys2.theta)/sys2.r^4)+(conj(-conj(q31))/7*(1/8*sqrt(21/pi))*exp(-1i*sys2.phi)*sin(sys2.theta)*(5*cos(sys2.theta)^2-1)/sys2.r^4)+(conj(q30)/7*1/4*sqrt(7/pi)*(5*cos(sys2.theta)^3-3*cos(sys2.theta))/sys2.r^4)+(conj(q31)/7*(-1/8*sqrt(21/pi))*exp(1i*sys2.phi)*sin(sys2.theta)*(5*cos(sys2.theta)^2-1)/sys2.r^4)+(conj(q32)/7*1/4*sqrt(105/(2*pi))*exp(2*1i*sys2.phi)*sin(sys2.theta)^2*cos(sys2.theta)/sys2.r^4)+(conj(q33)/7*(-1/8*sqrt(35/pi))*exp(3*1i*sys2.phi)*sin(sys2.theta)^3/sys2.r^4))+1/(em*e0)*((conj(conj(q44))/9*(3/16*sqrt(35/(2*pi))*exp(-4*1i*sys2.phi)*sin(sys2.theta)^4)/sys2.r^5)+(conj(-conj(q43))/9*(3/8*sqrt(35/pi)*exp(-3*1i*sys2.phi)*sin(sys2.theta)^3*cos(sys2.theta))/sys2.r^5)+(conj(conj(q42))/9*(3/8*sqrt(5/(2*pi))*exp(-2*1i*sys2.phi)*sin(sys2.theta)^2*(7*cos(sys2.theta)^2-1))/sys2.r^5)+(conj(-conj(q41))/9*(3/8*sqrt(5/pi)*exp(-1i*sys2.phi)*sin(sys2.theta)*(7*cos(sys2.theta)^3-3*cos(sys2.theta)))/sys2.r^5)+(conj(q40)/9*(3/16*sqrt(1/pi)*(35*cos(sys2.theta)^4-30*cos(sys2.theta)^2+3))/sys2.r^5)+(conj(q41)/9*(-3/8*sqrt(5/pi)*exp(1i*sys2.phi)*sin(sys2.theta)*(7*cos(sys2.theta)^3-3*cos(sys2.theta)))/sys2.r^5)+(conj(q42)/9*(3/8*sqrt(5/(2*pi))*exp(2*1i*sys2.phi)*sin(sys2.theta)^2*(7*cos(sys2.theta)^2-1))/sys2.r^5)+(conj(q43)/9*(-3/8*sqrt(35/pi)*exp(3*1i*sys2.phi)*sin(sys2.theta)^3*cos(sys2.theta))/sys2.r^5)+(conj(q44)/9*(3/16*sqrt(35/(2*pi))*exp(4*1i*sys2.phi)*sin(sys2.theta)^4)/sys2.r^5))+1/(em*e0)*((conj(-conj(q55))/11*(3/32*sqrt(77/pi)*exp(-5*1i*sys2.phi)*sin(sys2.theta)^5)/sys2.r^6)+(conj(conj(q54))/11*(3/16*sqrt(385/(2*pi))*exp(-4*1i*sys2.phi)*sin(sys2.theta)^4*cos(sys2.theta))/sys2.r^6)+(conj(-conj(q53))/11*(1/32*sqrt(385/pi)*exp(-3*1i*sys2.phi)*sin(sys2.theta)^3*(9*cos(sys2.theta)^2-1))/sys2.r^6)+(conj(conj(q52))/11*(1/8*sqrt(1155/(2*pi))*exp(-2*1i*sys2.phi)*sin(sys2.theta)^2*(3*cos(sys2.theta)^3-cos(sys2.theta)))/sys2.r^6)+(conj(-conj(q51))/11*(1/16*sqrt(165/(2*pi))*exp(-1i*sys2.phi)*sin(sys2.theta)*(21*cos(sys2.theta)^4-14*cos(sys2.theta)^2+1))/sys2.r^6)+(conj(q50)/11*(1/16*sqrt(11/pi)*(63*cos(sys2.theta)^5-70*cos(sys2.theta)^3+15*cos(sys2.theta)))/sys2.r^6)+(conj(q51)/11*(-1/16*sqrt(165/(2*pi))*exp(1i*sys2.phi)*sin(sys2.theta)*(21*cos(sys2.t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  // potential applied to the domaion surface being the source of the electric field polarizing the object

Selections
  sel1: Explicit "object_surface" on boundaries 17-22, 24-42, 44, 45, 48-62, 74, 75, 77, 79-81, 90, 96, 101-104, 107-136
  ball1: Ball "object_volume"
  sel2: Explicit "integration_sphere" on boundaries 13-16, 71, 72, 87, 99

Coordinate systems
  sys2: Spherical "Spherical System 2"

Geometry
  geom1 "Geometry 1" (3D, length unit m)
    imp1: Import "object" | type = cad; filename = geometry\tetris_s.stp; importtol = 1.0E-12
    sph3: Sphere "domain" | r = domain_size/2
    sph4: Sphere "integration_sphere" | r = R
    wp2: WorkPlane "auxiliary_plane_for_meshing_1" | unite = on
      c1: Circle | r = domain_size/2
      c2: Circle | r = R
    wp3: WorkPlane "auxiliary_plane_for_meshing_2" | quickplane = yz; unite = on
      c1: Circle | r = domain_size/2
      c2: Circle | r = R
    wp4: WorkPlane "auxiliary_plane_for_meshing_3" | quickplane = zx; unite = on
      c1: Circle | r = domain_size/2
      c2: Circle | r = R
    fin: Finalize "Form Union"

Materials
  mat1: Common "medium" on all domains
    def "Basic"
      relpermittivity = em
      electricconductivity = sm
  mat2: Common "object" on selection ball1
    def "Basic"
      relpermittivity = ep_aux
      electricconductivity = sp_aux

Physics
  ec: ConductiveMedia "Electric Currents" on all domains
    dependent variable V
    cucn1: CurrentConservation (default)
    ein1: ElectricInsulation (default)
    init1: init "Initial Values 1" (default)
    pot1: ElectricPotential "source_potential" on boundaries 5-8, 66, 67, 84, 100
      V0 = source_potential
      constraintType = symmetricConstraint
      constraintMethod = elemental

Mesh
  mesh1 "Mesh 1"
    size: MeshSizeDefault | hmax = 3.69E-5; hmin = 1.58E-6; hgrad = 1.35; hauto = 2; custom = off
    ftri1: FreeTri "Free Triangular 1" on boundaries 13-16, 71, 72, 87, 99
      size1: Size on boundaries 13-16, 71, 72, 87, 99 | hmax = 7e-6; hauto = 1; custom = on
    ftet1: FreeTet "Free Tetrahedral 1" on domains 5-12, 15-18, 20-23
    swe1: Sweep "Swept 1" on remaining entities
      dis1: Distribution on domains 1-4, 13, 14, 19, 24
        type = predefined
        elemcount = 30
        elemratio = 8
        method = geometric
      size1: Size (disabled) on entire geometry | hauto = 1

Studies
  std1 "Study 1"
    freq: Frequency "Frequency Domain" | punit = Hz; plist = f; useparam = on

Solver configurations
  sol1 "Solution 1" (study std1)
    v1: Variables "Dependent Variables 1"
    s1: Stationary "Stationary Solver 1"
      p1: Parametric
        sweeptype = sparse
        pname = {freq, ep_aux, sp_aux}
        plistarr = {{25000, 25000}, {3.2, 24.3}, {5.556E-15, 2.18E-4}}
        punit = {Hz, , S/m}
        pcontinuationmode = no
      fc1: FullyCoupled | linsolver = i1
      i1: Iterative | linsolver = bicgstab
        mg1: Multigrid

Datasets
  dset1: Solution on selection sel2 | solution = sol1
  join1: Join | data = dset1; solutions = one; data2 = dset1; solutions2 = one; solnum2 = 1; expr = data1-data2
  cpl1: CutPlane "xz_plane" | data = join1; quickplane = xy; genpoints = {{0, 0, 0}, {1, 0, 0}, {0, 1, 0}}
  surf1: Surface on boundaries 13-16, 71, 72, 87, 99 | data = dset1

Derived values
  int1: IntSurface "q00r" | data = join1; table = tbl5; expr = em*epsilon0_const*R^(-1)*sqrt(1/(4*pi))*real(V)
  int11: IntSurface "q10r" | data = join1; table = tbl6; expr = 3*em*epsilon0_const*sqrt(3/(4*pi))*cos(sys2.theta)*real(V)
  int3: IntSurface "q11r"
    data = join1
    table = tbl6
    expr = 3*em*epsilon0_const*(-sqrt(3/(8*pi)))*sin(sys2.theta)*exp(i*sys2.phi)*real(V)
  int4: IntSurface "q20r"
    data = join1
    table = tbl7
    expr = 5*em*epsilon0_const*R*sqrt(5/(16*pi))*(3*cos(sys2.theta)^2-1)*real(V)
  int5: IntSurface "q21r"
    data = join1
    table = tbl7
    expr = 5*em*epsilon0_const*R*(-sqrt(15/(8*pi)))*sin(sys2.theta)*cos(sys2.theta)*exp(i*sys2.phi)*real(V)
  int6: IntSurface "q22r"
    data = join1
    table = tbl7
    expr = 5*em*epsilon0_const*R*sqrt(15/(32*pi))*sin(sys2.theta)^2*exp(2*i*sys2.phi)*real(V)
  int7: IntSurface "q30r"
    data = join1
    table = tbl8
    expr = 7*em*epsilon0_const*R^2*1/4*sqrt(7/pi)*(5*cos(sys2.theta)^3-3*cos(sys2.theta))*real(V)
  int8: IntSurface "q31r"
    data = join1
    table = tbl8
    expr = 7*em*epsilon0_const*R^2*(-1/8*sqrt(21/pi))*exp(i*sys2.phi)*sin(sys2.theta)*(5*cos(sys2.theta)^2-1)*real(V)
  int9: IntSurface "q32r"
    data = join1
    table = tbl8
    expr = 7*em*epsilon0_const*R^2*1/4*sqrt(105/(2*pi))*exp(2*i*sys2.phi)*sin(sys2.theta)^2*cos(sys2.theta)*real(V)
  int10: IntSurface "q33r"
    data = join1
    table = tbl8
    expr = 7*em*epsilon0_const*R^2*(-1/8*sqrt(35/pi))*exp(3*i*sys2.phi)*sin(sys2.theta)^3*real(V)
  int23: IntSurface "q40r"
    data = join1
    table = tbl14
    expr = 9*em*epsilon0_const*R^3*(3/16*sqrt(1/pi)*(35*cos(sys2.theta)^4-30*cos(sys2.theta)^2+3))*real(V)
  int24: IntSurface "q41r"
    data = join1
    table = tbl14
    expr = 9*em*epsilon0_const*R^3*(-3/8*sqrt(5/pi)*exp(i*sys2.phi)*sin(sys2.theta)*(7*cos(sys2.theta)^3-3*cos(sys2.theta)))*real(V)
  int25: IntSurface "q42r"
    data = join1
    table = tbl14
    expr = 9*em*epsilon0_const*R^3*(3/8*sqrt(5/(2*pi))*exp(2*i*sys2.phi)*sin(sys2.theta)^2*(7*cos(sys2.theta)^2-1))*real(V)
  int26: IntSurface "q43r"
    data = join1
    table = tbl14
    expr = 9*em*epsilon0_const*R^3*(-3/8*sqrt(35/pi)*exp(3*i*sys2.phi)*sin(sys2.theta)^3*cos(sys2.theta))*real(V)
  int27: IntSurface "q44r"
    data = join1
    table = tbl14
    expr = 9*em*epsilon0_const*R^3*(3/16*sqrt(35/(2*pi))*exp(4*i*sys2.phi)*sin(sys2.theta)^4)*real(V)
  int28: IntSurface "q50r"
    data = join1
    table = tbl15
    expr = 11*em*epsilon0_const*R^4*(1/16*sqrt(11/pi)*(63*cos(sys2.theta)^5-70*cos(sys2.theta)^3+15*cos(sys2.theta)))*real(V)
  int29: IntSurface "q51r"
    data = join1
    table = tbl15
    expr = 11*em*epsilon0_const*R^4*(-1/16*sqrt(165/(2*pi))*exp(i*sys2.phi)*sin(sys2.theta)*(21*cos(sys2.theta)^4-14*cos(sys2.theta)^2+1))*real(V)
  int30: IntSurface "q52r"
    data = join1
    table = tbl15
    expr = 11*em*epsilon0_const*R^4*(1/8*sqrt(1155/(2*pi))*exp(2*i*sys2.phi)*sin(sys2.theta)^2*(3*cos(sys2.theta)^3-cos(sys2.theta)))*real(V)
  int31: IntSurface "q53r"
    data = join1
    table = tbl15
    expr = 11*em*epsilon0_const*R^4*(-1/32*sqrt(385/pi)*exp(3*i*sys2.phi)*sin(sys2.theta)^3*(9*cos(sys2.theta)^2-1))*real(V)
  int32: IntSurface "q54r"
    data = join1
    table = tbl15
    expr = 11*em*epsilon0_const*R^4*(3/16*sqrt(385/(2*pi))*exp(4*i*sys2.phi)*sin(sys2.theta)^4*cos(sys2.theta))*real(V)
  int33: IntSurface "q55r"
    data = join1
    table = tbl15
    expr = 11*em*epsilon0_const*R^4*(-3/32*sqrt(77/pi)*exp(5*i*sys2.phi)*sin(sys2.theta)^5)*real(V)
  int13: IntSurface "q00i" | data = join1; table = tbl16; expr = em*epsilon0_const*R^(-1)*sqrt(1/(4*pi))*imag(V)
  int14: IntSurface "q10i"
    data = join1
    table = tbl17
    expr = 3*em*epsilon0_const*sqrt(3/(4*pi))*cos(sys2.theta)*imag(V)
  int15: IntSurface "q11i"
    data = join1
    table = tbl17
    expr = 3*em*epsilon0_const*(-sqrt(3/(8*pi)))*sin(sys2.theta)*exp(i*sys2.phi)*imag(V)
  int16: IntSurface "q20i"
    data = join1
    table = tbl18
    expr = 5*em*epsilon0_const*R*sqrt(5/(16*pi))*(3*cos(sys2.theta)^2-1)*imag(V)
  int17: IntSurface "q21i"
    data = join1
    table = tbl18
    expr = 5*em*epsilon0_const*R*(-sqrt(15/(8*pi)))*sin(sys2.theta)*cos(sys2.theta)*exp(i*sys2.phi)*imag(V)
  int18: IntSurface "q22i"
    data = join1
    table = tbl18
    expr = 5*em*epsilon0_const*R*sqrt(15/(32*pi))*sin(sys2.theta)^2*exp(2*i*sys2.phi)*imag(V)
  int19: IntSurface "q30i"
    data = join1
    table = tbl19
    expr = 7*em*epsilon0_const*R^2*1/4*sqrt(7/pi)*(5*cos(sys2.theta)^3-3*cos(sys2.theta))*imag(V)
  int20: IntSurface "q31i"
    data = join1
    table = tbl19
    expr = 7*em*epsilon0_const*R^2*(-1/8*sqrt(21/pi))*exp(i*sys2.phi)*sin(sys2.theta)*(5*cos(sys2.theta)^2-1)*imag(V)
  int21: IntSurface "q32i"
    data = join1
    table = tbl19
    expr = 7*em*epsilon0_const*R^2*1/4*sqrt(105/(2*pi))*exp(2*i*sys2.phi)*sin(sys2.theta)^2*cos(sys2.theta)*imag(V)
  int22: IntSurface "q33i"
    data = join1
    table = tbl19
    expr = 7*em*epsilon0_const*R^2*(-1/8*sqrt(35/pi))*exp(3*i*sys2.phi)*sin(sys2.theta)^3*imag(V)
  int34: IntSurface "q40i"
    data = join1
    table = tbl20
    expr = 9*em*epsilon0_const*R^3*(3/16*sqrt(1/pi)*(35*cos(sys2.theta)^4-30*cos(sys2.theta)^2+3))*imag(V)
  int35: IntSurface "q41i"
    data = join1
    table = tbl20
    expr = 9*em*epsilon0_const*R^3*(-3/8*sqrt(5/pi)*exp(i*sys2.phi)*sin(sys2.theta)*(7*cos(sys2.theta)^3-3*cos(sys2.theta)))*imag(V)
  int36: IntSurface "q42i"
    data = join1
    table = tbl20
    expr = 9*em*epsilon0_const*R^3*(3/8*sqrt(5/(2*pi))*exp(2*i*sys2.phi)*sin(sys2.theta)^2*(7*cos(sys2.theta)^2-1))*imag(V)
  int37: IntSurface "q43i"
    data = join1
    table = tbl20
    expr = 9*em*epsilon0_const*R^3*(-3/8*sqrt(35/pi)*exp(3*i*sys2.phi)*sin(sys2.theta)^3*cos(sys2.theta))*imag(V)
  int38: IntSurface "q44i"
    data = join1
    table = tbl20
    expr = 9*em*epsilon0_const*R^3*(3/16*sqrt(35/(2*pi))*exp(4*i*sys2.phi)*sin(sys2.theta)^4)*imag(V)
  int39: IntSurface "q50i"
    data = join1
    table = tbl21
    expr = 11*em*epsilon0_const*R^4*(1/16*sqrt(11/pi)*(63*cos(sys2.theta)^5-70*cos(sys2.theta)^3+15*cos(sys2.theta)))*imag(V)
  int40: IntSurface "q51i"
    data = join1
    table = tbl21
    expr = 11*em*epsilon0_const*R^4*(-1/16*sqrt(165/(2*pi))*exp(i*sys2.phi)*sin(sys2.theta)*(21*cos(sys2.theta)^4-14*cos(sys2.theta)^2+1))*imag(V)
  int41: IntSurface "q52i"
    data = join1
    table = tbl21
    expr = 11*em*epsilon0_const*R^4*(1/8*sqrt(1155/(2*pi))*exp(2*i*sys2.phi)*sin(sys2.theta)^2*(3*cos(sys2.theta)^3-cos(sys2.theta)))*imag(V)
  int42: IntSurface "q53i"
    data = join1
    table = tbl21
    expr = 11*em*epsilon0_const*R^4*(-1/32*sqrt(385/pi)*exp(3*i*sys2.phi)*sin(sys2.theta)^3*(9*cos(sys2.theta)^2-1))*imag(V)
  int43: IntSurface "q54i"
    data = join1
    table = tbl21
    expr = 11*em*epsilon0_const*R^4*(3/16*sqrt(385/(2*pi))*exp(4*i*sys2.phi)*sin(sys2.theta)^4*cos(sys2.theta))*imag(V)
  int44: IntSurface "q55i"
    data = join1
    table = tbl21
    expr = 11*em*epsilon0_const*R^4*(-3/32*sqrt(77/pi)*exp(5*i*sys2.phi)*sin(sys2.theta)^5)*imag(V)

Tables
  tbl5: Table "spherical monopole"
    // Surface Integration 1 (1/sf^2*24.3*epsilon0_const*(R*sf)^(-1)*sqrt(1/(4*pi))*sphint(R*sf,(V-(2*sf/(domain_size*sf)*z))))
    em*epsilon0_const*R^(-1)*sqrt(1/(4*pi))*real(V) (C)
    -9.94626e-07
  tbl6: Table "spherical dipole"
    // q10_ (1/sf^3*3*24.3*epsilon0_const*sqrt(3/(4*pi))*cos(sys2.theta)*V)
    3*em*epsilon0_const*sqrt(3/(4*pi))*cos(sys2.theta)*real(V) (C*m) | 3*em*epsilon0_const*(-sqrt(3/(8*pi)))*sin(sys2.theta)*exp(i*sys2.phi)*real(V) (C*m)
    4.83379e-10 | 0.000362886-3.2741e-05i
  tbl7: Table "spherical quadrupole"
    // q20_ (1/sf^4*5*24.3*epsilon0_const*(R*sf)*sqrt(5/(16*pi))*(3*cos(sys2.theta)^2-1)*V)
    5*em*epsilon0_const*R*sqrt(5/(16*pi))*(3*cos(sys2.theta)^2-1)*real(V) (m^2*s*A) | 5*em*epsilon0_const*R*(-sqrt(15/(8*pi)))*sin(sys2.theta)*cos(sys2.theta)*exp(i*sys2.phi)*real(V) (m^2*s*A) | 5*em*epsilon0_const*R*sqrt(15/(32*pi))*sin(sys2.theta)^2*exp(2*i*sys2.phi)*real(V) (m^2*s*A)
    6.69746e-14 | -2.10613e-14-1.28046e-15i | -6.81772e-14-5.81833e-14i
  tbl8: Table "spherical octupole"
    // q30_ (1/sf^5*7*24.3*epsilon0_const*(R*sf)^2*1/4*sqrt(7/pi)*(5*cos(sys2.theta)^3-3*cos(sys2.theta))*V)
    7*em*epsilon0_const*R^2*1/4*sqrt(7/pi)*(5*cos(sys2.theta)^3-3*cos(sys2.theta))*real(V) (m^3*s*A) | 7*em*epsilon0_const*R^2*(-1/8*sqrt(21/pi))*exp(i*sys2.phi)*sin(sys2.theta)*(5*cos(sys2.theta)^2-1)*real(V) (m^3*s*A) | 7*em*epsilon0_const*R^2*1/4*sqrt(105/(2*pi))*exp(2*i*sys2.phi)*sin(sys2.theta)^2*cos(sys2.theta)*real(V) (m^3*s*A) | 7*em*epsilon0_const*R^2*(-1/8*sqrt(35/pi))*exp(3*i*sys2.phi)*sin(sys2.theta)^3*real(V) (m^3*s*A)
    -9.85952e-19 | -1.63129e-12-3.44192e-13i | 7.98399e-19+3.44109e-18i | 1.15395e-12+1.39619e-12i
  tbl14: Table "spherical hexadecapole"
    // q20_ (1/sf^4*5*24.3*epsilon0_const*(R*sf)*sqrt(5/(16*pi))*(3*cos(sys2.theta)^2-1)*V)
    9*em*epsilon0_const*R^3*(3/16*sqrt(1/pi)*(35*cos(sys2.theta)^4-30*cos(sys2.theta)^2+3))*real(V) (m^4*s*A) | 9*em*epsilon0_const*R^3*(-3/8*sqrt(5/pi)*exp(i*sys2.phi)*sin(sys2.theta)*(7*cos(sys2.theta)^3-3*cos(sys2.theta)))*real(V) (m^4*s*A) | 9*em*epsilon0_const*R^3*(3/8*sqrt(5/(2*pi))*exp(2*i*sys2.phi)*sin(sys2.theta)^2*(7*cos(sys2.theta)^2-1))*real(V) (m^4*s*A) | 9*em*epsilon0_const*R^3*(-3/8*sqrt(35/pi)*exp(3*i*sys2.phi)*sin(sys2.theta)^3*cos(sys2.theta))*real(V) (m^4*s*A) | 9*em*epsilon0_const*R^3*(3/16*sqrt(35/(2*pi))*exp(4*i*sys2.phi)*sin(sys2.theta)^4)*real(V) (m^4*s*A)
    -1.38503e-21 | 1.66649e-23+5.53266e-22i | 1.48623e-21+9.38731e-22i | -1.30915e-21+7.59586e-22i | -6.94987e-22-2.79632e-21i
  tbl15: Table "spherical 32-pole"
    // q30_ (1/sf^5*7*24.3*epsilon0_const*(R*sf)^2*1/4*sqrt(7/pi)*(5*cos(sys2.theta)^3-3*cos(sys2.theta))*V)
    11*em*epsilon0_const*R^4*(1/16*sqrt(11/pi)*(63*cos(sys2.theta)^5-70*cos(sys2.theta)^3+15*cos(sys2.theta)))*real(V) (m^5*s*A) | 11*em*epsilon0_const*R^4*(-1/16*sqrt(165/(2*pi))*exp(i*sys2.phi)*sin(sys2.theta)*(21*cos(sys2.theta)^4-14*cos(sys2.theta)^2+1))*real(V) (m^5*s*A) | 11*em*epsilon0_const*R^4*(1/8*sqrt(1155/(2*pi))*exp(2*i*sys2.phi)*sin(sys2.theta)^2*(3*cos(sys2.theta)^3-cos(sys2.theta)))*real(V) (m^5*s*A) | 11*em*epsilon0_const*R^4*(-1/32*sqrt(385/pi)*exp(3*i*sys2.phi)*sin(sys2.theta)^3*(9*cos(sys2.theta)^2-1))*real(V) (m^5*s*A) | 11*em*epsilon0_const*R^4*(3/16*sqrt(385/(2*pi))*exp(4*i*sys2.phi)*sin(sys2.theta)^4*cos(sys2.theta))*real(V) (m^5*s*A) | 11*em*epsilon0_const*R^4*(-3/32*sqrt(77/pi)*exp(5*i*sys2.phi)*sin(sys2.theta)^5)*real(V) (m^5*s*A)
    -2.80564e-26 | 8.7971e-21+2.94261e-21i | 7.64141e-26+7.21516e-26i | -5.45494e-21-8.65201e-21i | -1.15658e-25+6.68639e-26i | -1.55205e-21+1.47659e-20i
  tbl16: Table "spherical monopole 1"
    // Surface Integration 1 (1/sf^2*24.3*epsilon0_const*(R*sf)^(-1)*sqrt(1/(4*pi))*sphint(R*sf,(V-(2*sf/(domain_size*sf)*z))))
    em*epsilon0_const*R^(-1)*sqrt(1/(4*pi))*imag(V) (C)
    4.25675e-08
  tbl17: Table "spherical dipole 1"
    // q10_ (1/sf^3*3*24.3*epsilon0_const*sqrt(3/(4*pi))*cos(sys2.theta)*V)
    3*em*epsilon0_const*sqrt(3/(4*pi))*cos(sys2.theta)*imag(V) (C*m) | 3*em*epsilon0_const*(-sqrt(3/(8*pi)))*sin(sys2.theta)*exp(i*sys2.phi)*imag(V) (C*m)
    -2.32414e-11 | -1.13169e-05+2.48939e-06i
  tbl18: Table "spherical quadrupole 1"
    // q20_ (1/sf^4*5*24.3*epsilon0_const*(R*sf)*sqrt(5/(16*pi))*(3*cos(sys2.theta)^2-1)*V)
    5*em*epsilon0_const*R*sqrt(5/(16*pi))*(3*cos(sys2.theta)^2-1)*imag(V) (m^2*s*A) | 5*em*epsilon0_const*R*(-sqrt(15/(8*pi)))*sin(sys2.theta)*cos(sys2.theta)*exp(i*sys2.phi)*imag(V) (m^2*s*A) | 5*em*epsilon0_const*R*sqrt(15/(32*pi))*sin(sys2.theta)^2*exp(2*i*sys2.phi)*imag(V) (m^2*s*A)
    -2.10802e-15 | 9.58613e-16+6.23425e-16i | 3.41912e-15+3.72774e-15i
  tbl19: Table "spherical octupole 1"
    // q30_ (1/sf^5*7*24.3*epsilon0_const*(R*sf)^2*1/4*sqrt(7/pi)*(5*cos(sys2.theta)^3-3*cos(sys2.theta))*V)
    7*em*epsilon0_const*R^2*1/4*sqrt(7/pi)*(5*cos(sys2.theta)^3-3*cos(sys2.theta))*imag(V) (m^3*s*A) | 7*em*epsilon0_const*R^2*(-1/8*sqrt(21/pi))*exp(i*sys2.phi)*sin(sys2.theta)*(5*cos(sys2.theta)^2-1)*imag(V) (m^3*s*A) | 7*em*epsilon0_const*R^2*1/4*sqrt(105/(2*pi))*exp(2*i*sys2.phi)*sin(sys2.theta)^2*cos(sys2.theta)*imag(V) (m^3*s*A) | 7*em*epsilon0_const*R^2*(-1/8*sqrt(35/pi))*exp(3*i*sys2.phi)*sin(sys2.theta)^3*imag(V) (m^3*s*A)
    5.16512e-20 | 5.71763e-14+6.84862e-15i | 7.89368e-20-7.25109e-21i | -4.93577e-14-2.90591e-14i
  tbl20: Table "spherical hexadecapole 1"
    // q20_ (1/sf^4*5*24.3*epsilon0_const*(R*sf)*sqrt(5/(16*pi))*(3*cos(sys2.theta)^2-1)*V)
    9*em*epsilon0_const*R^3*(3/16*sqrt(1/pi)*(35*cos(sys2.theta)^4-30*cos(sys2.theta)^2+3))*imag(V) (m^4*s*A) | 9*em*epsilon0_const*R^3*(-3/8*sqrt(5/pi)*exp(i*sys2.phi)*sin(sys2.theta)*(7*cos(sys2.theta)^3-3*cos(sys2.theta)))*imag(V) (m^4*s*A) | 9*em*epsilon0_const*R^3*(3/8*sqrt(5/(2*pi))*exp(2*i*sys2.phi)*sin(sys2.theta)^2*(7*cos(sys2.theta)^2-1))*imag(V) (m^4*s*A) | 9*em*epsilon0_const*R^3*(-3/8*sqrt(35/pi)*exp(3*i*sys2.phi)*sin(sys2.theta)^3*cos(sys2.theta))*imag(V) (m^4*s*A) | 9*em*epsilon0_const*R^3*(3/16*sqrt(35/(2*pi))*exp(4*i*sys2.phi)*sin(sys2.theta)^4)*imag(V) (m^4*s*A)
    6.13125e-23 | -1.31687e-23-2.93028e-23i | -6.11067e-23-4.74001e-23i | 4.55382e-23-4.96995e-24i | 1.94555e-23+1.29253e-22i
  tbl21: Table "spherical 32-pole 1"
    // q30_ (1/sf^5*7*24.3*epsilon0_const*(R*sf)^2*1/4*sqrt(7/pi)*(5*cos(sys2.theta)^3-3*cos(sys2.theta))*V)
    11*em*epsilon0_const*R^4*(1/16*sqrt(11/pi)*(63*cos(sys2.theta)^5-70*cos(sys2.theta)^3+15*cos(sys2.theta)))*imag(V) (m^5*s*A) | 11*em*epsilon0_const*R^4*(-1/16*sqrt(165/(2*pi))*exp(i*sys2.phi)*sin(sys2.theta)*(21*cos(sys2.theta)^4-14*cos(sys2.theta)^2+1))*imag(V) (m^5*s*A) | 11*em*epsilon0_const*R^4*(1/8*sqrt(1155/(2*pi))*exp(2*i*sys2.phi)*sin(sys2.theta)^2*(3*cos(sys2.theta)^3-cos(sys2.theta)))*imag(V) (m^5*s*A) | 11*em*epsilon0_const*R^4*(-1/32*sqrt(385/pi)*exp(3*i*sys2.phi)*sin(sys2.theta)^3*(9*cos(sys2.theta)^2-1))*imag(V) (m^5*s*A) | 11*em*epsilon0_const*R^4*(3/16*sqrt(385/(2*pi))*exp(4*i*sys2.phi)*sin(sys2.theta)^4*cos(sys2.theta))*imag(V) (m^5*s*A) | 11*em*epsilon0_const*R^4*(-3/32*sqrt(77/pi)*exp(5*i*sys2.phi)*sin(sys2.theta)^5)*imag(V) (m^5*s*A)
    2.93225e-27 | -3.52294e-22-1.01957e-22i | -5.07787e-27-4.26695e-27i | 2.48379e-22+3.15411e-22i | 4.16077e-27+2.80459e-27i | -1.01825e-23-5.75985e-22i

Plots
  pg1: PlotGroup2D "induced_multipole" | data = cpl1
    surf1: Surface | expr = imag(V); wireframe = on