// COMSOL Multiphysics 5.1.0.234 model "mst_model.mph"
// Outline of the model tree

Parameters
  x_obj = 0 [m]  // position of the object
  y_obj = 0 [m]
  z_obj = 70e-6 [m]
  psi_obj = 45*pi/180 [rad]  // orientation of the object
  theta_obj = 25*pi/180 [rad]
  phi_obj = 0*pi/180 [rad]
  u1 = 10*exp(i*0) [V]  // phasors of harmonic voltages applied to the electrodes
  u2 = 10*exp(i*pi/2) [V]
  u3 = 50*exp(i*pi) [V]
  u4 = 50*exp(i*3/2*pi) [V]
  inf_addition = 100e-6 [m]  // size of the infinite element domains
  domain_height = 800e-6 [m]  // height of the whole simulation domain
  f = 25000 [Hz]  // frequency of the electric field
  em = 24.3  // relative permittivity of the medium
  sm = 2.18e-4 [S/m]  // electric conductivity of medium
  ep = 3.2  // relative permittivity of the object
  sp = 5.556e-15 [S/m]  // electric conductivity of the object

Selections
  sel1: Explicit "object" on boundaries 50-99

Coordinate systems
  ie1: InfiniteElement "Infinite Element Domain 1" on domains 1-8, 10-12, 14-19

Geometry
  geom1 "Geometry 1" (3D, length unit m)
    imp1: Import "electrode_array"
      contributeto = csel1
      type = cad
      filename = em_model\preprocessing\geometry\quadrupolar_electrode_array.dxf
      keepsolid = off
      keepbnd = off
      keepfree = on
      unitecurves = off
      removeredundant = on
    sca2: Scale | input = imp1(1), imp1(2), imp1(3), imp1(4), imp1(5); isotropic = 1e-6
    blk1: Block | contributeto = none; pos = {-800e-6, -800e-6, 0}; size = {1600e-6, 1600e-6, domain_height}
    imp2: Import "object"
      contributeto = csel2
      type = cad
      filename = em_model\preprocessing\geometry\tetris_s.stp
      importtol = 1.0E-12
    mov1: Move | input = imp2.Tleso1; displx = x_obj; disply = y_obj; displz = z_obj
    rot4: Rotate | input = mov1; rot = psi_obj; pos = {x_obj, y_obj, z_obj}; axistype = x
    rot5: Rotate | input = rot4; rot = theta_obj; pos = {x_obj, y_obj, z_obj}; axistype = y
    rot6: Rotate | input = rot5; rot = phi_obj; pos = {x_obj, y_obj, z_obj}; axistype = z
    blk2: Block | pos = {-800e-6, 800e-6-inf_addition, 0}; size = {1600e-6, inf_addition, domain_height}
    blk3: Block | pos = {-800e-6, -800e-6, 0}; size = {1600e-6, inf_addition, domain_height}
    blk4: Block | pos = {-800e-6, -800e-6, 0}; size = {inf_addition, 1600e-6, domain_height}
    blk5: Block | pos = {800e-6-inf_addition, -800e-6, 0}; size = {inf_addition, 1600e-6, domain_height}
    blk6: Block | pos = {-800e-6, -800e-6, domain_height-inf_addition}; size = {1600e-6, 1600e-6, inf_addition}
    fin: Finalize "Form Union"

Materials
  mat1: Common "medium" on all domains
    def "Basic"
      relpermittivity = em
      electricconductivity = sm
  mat2: Common "object" on selection geom1_csel2_dom
    def "Basic"
      relpermittivity = ep
      electricconductivity = sp

Physics
  ec: ConductiveMedia "Electric Currents" on all domains
    dependent variable V
    cucn1: CurrentConservation (default)
    ein1: ElectricInsulation (default)
    init1: init "Initial Values 1" (default)
    pot1: ElectricPotential "voltage_1st_electrode" on boundaries 49
    pot2: ElectricPotential "voltage_2nd_electrode" on boundaries 100
    pot3: ElectricPotential "voltage_3rd_electrode" on boundaries 48
    pot4: ElectricPotential "voltage_4th_electrode" on boundaries 47
    fcal1: ForceCalculation on selection geom1_csel2_dom
    gnd1: Ground (disabled) on boundaries 3, 10, 17, 26, 40, 56, 103, 110, 117

Mesh
  mesh1 "Mesh 1"
    size: MeshSizeDefault | hmax = 3.2E-5; hmin = 3.2E-7; hgrad = 1.3; hauto = 1; custom = off
    ftri1: FreeTri "Free Triangular 1" on selection sel1
      size1: Size on selection sel1 | hmax = 5E-6; hauto = 1; custom = on
    ftet1: FreeTet "Free Tetrahedral 1" on remaining entities

Studies
  std1 "Study 1"
    freq: Frequency "Frequency Domain" | punit = Hz; plist = f

Solver configurations
  sol2 "Solution 2" (study std1)
    v1: Variables "Dependent Variables 1"
    s1: Stationary "Stationary Solver 1"
      p1: Parametric | pname = freq; plistarr = f; punit = Hz; pcontinuationmode = no
      fc1: FullyCoupled | linsolver = i1
      i1: Iterative | linsolver = bicgstab
        mg1: Multigrid

Datasets
  dset8: Solution | solution = sol2

Derived values
  gev1: EvalGlobal "F_x" | data = dset8; table = tbl1; expr = ec.Forceavx_0
  gev2: EvalGlobal "F_y" | data = dset8; table = tbl1; expr = ec.Forceavy_0
  gev3: EvalGlobal "F_z" | data = dset8; table = tbl1; expr = ec.Forceavz_0
  int1: IntSurface "T_x" on selection geom1_csel2_bnd
    data = dset8
    table = tbl2
    expr = (ec.nTavz_0*(ec.ry-y_obj)-ec.nTavy_0*(ec.rz-z_obj))*ec.dVol
  int2: IntSurface "T_y" on selection geom1_csel2_bnd
    data = dset8
    table = tbl2
    expr = (-ec.nTavz_0*(ec.rx-x_obj)+ec.nTavx_0*(ec.rz-z_obj))*ec.dVol
  int3: IntSurface "T_z" on selection geom1_csel2_bnd
    data = dset8
    table = tbl2
    expr = (ec.nTavy_0*(ec.rx-x_obj)-ec.nTavx_0*(ec.ry-y_obj))*ec.dVol

Tables
  tbl1: Table "dep_force"
    // Global Evaluation 1 (es.Forceavx_0)
    freq (Hz) | Electromagnetic force, time average, x component (N) | Electromagnetic force, time average, y component (N) | Electromagnetic force, time average, z component (N)
    25000 | 7.58978e-10 | 9.05374e-10 | 9.98889e-10
  tbl2: Table "electrorotational_torque"
    // Global Evaluation 4 (es.Tx_0)
    freq (Hz) | (ec.nTavz_0*(ec.ry-y_obj)-ec.nTavy_0*(ec.rz-z_obj))*ec.dVol (J) | (-ec.nTavz_0*(ec.rx-x_obj)+ec.nTavx_0*(ec.rz-z_obj))*ec.dVol (J) | (ec.nTavy_0*(ec.rx-x_obj)-ec.nTavx_0*(ec.ry-y_obj))*ec.dVol (J)
    25000 | -2.41325e-14 | -1.15511e-14 | -2.3587e-14